*Heading
** Job name: ToiUu1000 Model name: Model-1

*Preprint, echo=NO, model=NO, history=NO, contact=NO
**
** PARTS
**
*Part, name=B
*Node
      1, 0.0599999987,  0.204999998
      2, 0.0579999983,  0.204999998
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*Element, type=CAX4RT
  1,   1,   2,   8,   7
  2,   2,   3,   9,   8
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*Nset, nset=Set-1, generate
   1,  618,    1
*Elset, elset=Set-1, generate
   1,  510,    1
** Section: B
*Solid Section, elset=Set-1, material=B1
,
*End Part
**
*Part, name=Die
*Node
      1,        0.125, 0.0675455183
      2, 0.0599999987, 0.0675455183
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*Element, type=CAX4T
  1,   1,  11, 142,  70
  2,  11,  12, 143, 142
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*Element, type=CAX3T
497, 657, 646, 647
*Node
    672,        0.125,           0.,           0.
*Nset, nset=Die-RefPt_, internal
672,
*Nset, nset=Set-1, generate
   1,  671,    1
*Elset, elset=Set-1, generate
   1,  613,    1
** Section: Die
*Solid Section, elset=Set-1, material=SKD61
,
*End Part
**
*Part, name=Punch
*Node
      1,           0., 0.0454448648
      2, 0.0649999976, 0.0454448648
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*Element, type=CAX4T
  1,   1,   9, 104,  74
  2,   9,  10, 105, 104
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*Element, type=CAX3T
305, 510, 503, 506
306, 506, 495, 496
307, 529, 483, 526
308, 498, 532, 500
*Node
    534, 0.0649999976,  0.123301268,           0.
*Nset, nset=Punch-RefPt_, internal
534,
*Nset, nset=Set-1, generate
   1,  533,    1
*Elset, elset=Set-1, generate
   1,  490,    1
** Section: Pucnh
*Solid Section, elset=Set-1, material=SKD61
,
*End Part
**
**
** ASSEMBLY
**
*Assembly, name=Assembly
**
*Instance, name=B-1, part=B
*End Instance
**
*Instance, name=Die-1, part=Die
*End Instance
**
*Instance, name=P-1, part=Punch
          0., 0.210000279441629,           0.
*End Instance
**
*Nset, nset=B, instance=B-1, generate
   1,  618,    1
*Elset, elset=B, instance=B-1, generate
   1,  510,    1
*Nset, nset=Die, instance=Die-1, generate
   1,  671,    1
*Elset, elset=Die, instance=Die-1, generate
   1,  613,    1
*Nset, nset=Punch, instance=P-1, generate
   1,  533,    1
*Elset, elset=Punch, instance=P-1, generate
   1,  490,    1
*Nset, nset=Set-6, instance=Die-1
 672,
*Nset, nset=Set-7, instance=Die-1
 672,
*Nset, nset=Set-8, instance=Die-1
 672,
*Nset, nset=Set-9, instance=B-1, generate
 613,  618,    1
*Elset, elset=Set-9, instance=B-1, generate
 506,  510,    1
*Nset, nset=Set-10, instance=P-1
 534,
*Nset, nset=Set-11, instance=Die-1, generate
   1,  671,    1
*Elset, elset=Set-11, instance=Die-1, generate
   1,  613,    1
*Nset, nset=_PickedSet23, internal, instance=P-1
 534,
*Nset, nset=_PickedSet29, internal, instance=Die-1
 672,
*Elset, elset=_B_Phai_S4, internal, instance=B-1, generate
   1,  506,    5
*Surface, type=ELEMENT, name=B_Phai
_B_Phai_S4, S4
*Elset, elset=_B_Trai_S2, internal, instance=B-1, generate
   5,  510,    5
*Surface, type=ELEMENT, name=B_Trai
_B_Trai_S2, S2
*Elset, elset=_B_Trai2_S1, internal, instance=B-1, generate
 1,  5,  1
*Elset, elset=_B_Trai2_S2, internal, instance=B-1, generate
   5,  510,    5
*Surface, type=ELEMENT, name=B_Trai2
_B_Trai2_S1, S1
_B_Trai2_S2, S2
*Elset, elset=_Die_B_S2, internal, instance=Die-1, generate
  16,  256,   16
*Elset, elset=_Die_B_S1, internal, instance=Die-1
 498, 500, 504, 557
*Elset, elset=_Die_B_S3, internal, instance=Die-1
 502, 514, 536, 538
*Elset, elset=_Die_B_S4, internal, instance=Die-1, generate
 257,  485,   12
*Surface, type=ELEMENT, name=Die_B
_Die_B_S2, S2
_Die_B_S1, S1
_Die_B_S4, S4
_Die_B_S3, S3
*Elset, elset=_Puch_B_S2, internal, instance=P-1, generate
  16,  304,   16
*Elset, elset=_Puch_B_S1, internal, instance=P-1
 309, 310, 325, 326, 334, 338, 339, 347, 349, 350, 353, 355, 368, 375, 387, 484
*Elset, elset=_Puch_B_S3, internal, instance=P-1
 317, 336, 340, 341, 342, 343, 356
*Surface, type=ELEMENT, name=Puch_B
_Puch_B_S2, S2
_Puch_B_S1, S1
_Puch_B_S3, S3
*Elset, elset=_Surf-6_S1, internal, instance=B-1, generate
 1,  5,  1
*Surface, type=ELEMENT, name=Surf-6
_Surf-6_S1, S1
*Elset, elset=_Surf-7_S3, internal, instance=B-1, generate
 506,  510,    1
*Surface, type=ELEMENT, name=Surf-7
_Surf-7_S3, S3
*Elset, elset=_Surf-8_S1, internal, instance=B-1, generate
 1,  5,  1
*Elset, elset=_Surf-8_S2, internal, instance=B-1, generate
   5,  510,    5
*Elset, elset=_Surf-8_S3, internal, instance=B-1, generate
 506,  510,    1
*Elset, elset=_Surf-8_S4, internal, instance=B-1, generate
   1,  506,    5
*Surface, type=ELEMENT, name=Surf-8
_Surf-8_S1, S1
_Surf-8_S2, S2
_Surf-8_S4, S4
_Surf-8_S3, S3
** Constraint: RigidDie
*Rigid Body, ref node=_PickedSet29, elset=Die, isothermal=YES
** Constraint: RigidPuch
*Rigid Body, ref node=_PickedSet23, elset=Punch, isothermal=YES
*End Assembly
*Amplitude, name=Amp-2
             0.,              0.,              1.,              1.
*Amplitude, name=Linera
             0.,              0.,              3.,              1.,              6.,              0.
**
** MATERIALS
**
*Material, name=B
*Conductivity
50., 25.
46.,300.
35.,750.
*Density
 7.85e-09,
*Elastic
 2.06e+08, 0.3
*Expansion
11.,
*Inelastic Heat Fraction
         0.9,
*Plastic
   286.1,     0.,    25.
 413.529, 0.0025,    25.
 435.366,  0.005,    25.
 449.837, 0.0075,    25.
 460.946,   0.01,    25.
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 260.742,     1.,  1000.
*Specific Heat
 4.73e+08,
*Material, name=B1
*Conductivity
50., 25.
46.,300.
35.,750.
*Density
7850.,
*Elastic
 2.06e+11, 0.3
*Expansion
 1.1e-05,
*Inelastic Heat Fraction
         0.9,
*Plastic
   2.861e+08,     0.,    25.
 4.13529e+08, 0.0025,    25.
 4.35366e+08,  0.005,    25.
 4.49837e+08, 0.0075,    25.
 4.60946e+08,   0.01,    25.
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 2.60742e+08,     1.,  1000.
*Specific Heat
473.,
*Material, name=Die
*Conductivity
204.,  0.
225.,300.
*Density
2700.,
*Elastic
 2.69e+11, 0.33
*Expansion
 8.42e-05,
*Plastic
    6e+07,    0.,   20.
    9e+07, 0.125,   20.
 1.13e+08,  0.25,   20.
 1.24e+08, 0.375,   20.
 1.33e+08,   0.5,   20.
 1.65e+08,    1.,   20.
 1.66e+08,    2.,   20.
    6e+07,    0.,   50.
    8e+07, 0.125,   50.
  9.7e+07,  0.25,   50.
  1.1e+08, 0.375,   50.
  1.2e+08,   0.5,   50.
  1.5e+08,    1.,   50.
 1.51e+08,    2.,   50.
    5e+07,    0.,  100.
  6.5e+07, 0.125,  100.
 8.15e+07,  0.25,  100.
  9.1e+07, 0.375,  100.
    1e+08,   0.5,  100.
 1.25e+08,    1.,  100.
 1.26e+08,    2.,  100.
  4.5e+07,    0.,  150.
  6.3e+07, 0.125,  150.
  7.5e+07,  0.25,  150.
  8.9e+07,   0.5,  150.
  1.1e+08,    1.,  150.
 1.11e+08,    2.,  150.
*Specific Heat
880.,
*Material, name=Punch
*Conductivity
204.,  0.
225.,300.
*Density
2700.,
*Elastic
 2.8e+11, 0.34
*Expansion
 8.42e-05,
*Plastic
    6e+07,    0.,   20.
    9e+07, 0.125,   20.
 1.13e+08,  0.25,   20.
 1.24e+08, 0.375,   20.
 1.33e+08,   0.5,   20.
 1.65e+08,    1.,   20.
 1.66e+08,    2.,   20.
    6e+07,    0.,   50.
    8e+07, 0.125,   50.
  9.7e+07,  0.25,   50.
  1.1e+08, 0.375,   50.
  1.2e+08,   0.5,   50.
  1.5e+08,    1.,   50.
 1.51e+08,    2.,   50.
    5e+07,    0.,  100.
  6.5e+07, 0.125,  100.
 8.15e+07,  0.25,  100.
  9.1e+07, 0.375,  100.
    1e+08,   0.5,  100.
 1.25e+08,    1.,  100.
 1.26e+08,    2.,  100.
  4.5e+07,    0.,  150.
  6.3e+07, 0.125,  150.
  7.5e+07,  0.25,  150.
  8.9e+07,   0.5,  150.
  1.1e+08,    1.,  150.
 1.11e+08,    2.,  150.
*Specific Heat
880.,
** SKD61
*Material, name=SKD61
*Conductivity
25., 25.
29.,400.
30.,600.
*Density
7800.,
*Elastic
 2.1e+11, 0.3
*Expansion
   0., 25.
 12.6,400.
 13.2,600.
*Specific Heat
 4.6e+08,
**
** INTERACTION PROPERTIES
**
*Surface Interaction, name=Contact1
1.,
*Friction
0.,
*Surface Behavior, pressure-overclosure=HARD
*Gap Conductance
 0.5,0.
 0.2,3.
  0.,6.
*Gap Conductance, pressure
 0.5, 0.1
 1.5,  5.
 2.3, 10.
 2.5, 15.
 2.7, 20.
 2.8, 25.
  3., 30.
 3.1, 35.
 3.3, 40.
*Gap Heat Generation
1., 0.5
*Surface Interaction, name=Contact2
1.,
*Friction, slip tolerance=0.005
 0.1,
*Surface Behavior, pressure-overclosure=HARD
*Gap Heat Generation
1., 0.5
**
** BOUNDARY CONDITIONS
**
** Name: B Type: Symmetry/Antisymmetry/Encastre
*Boundary
Set-9, YSYMM
** Name: Die Type: Symmetry/Antisymmetry/Encastre
*Boundary
Set-8, ENCASTRE
** Name: Nhet_punch Type: Temperature
*Boundary
Punch, 11, 11
** Name: Nhiet_B Type: Temperature
*Boundary
B, 11, 11
** Name: Nhiet_Die Type: Temperature
*Boundary
Set-11, 11, 11
** Name: Punch Type: Displacement/Rotation
*Boundary
Set-10, 1, 1
Set-10, 2, 2
Set-10, 6, 6
**
** PREDEFINED FIELDS
**
** Name: Predefined Field-1   Type: Temperature
*Initial Conditions, type=TEMPERATURE
Punch, 25.
** Name: Predefined Field-2   Type: Temperature
*Initial Conditions, type=TEMPERATURE
B, 1000.
** Name: Predefined Field-3   Type: Temperature
*Initial Conditions, type=TEMPERATURE
Die, 25.
**
** INTERACTIONS
**
** Interaction: Die
*Contact Pair, interaction=Contact2, type=SURFACE TO SURFACE
B_Phai, Die_B
** Interaction: Punch
*Contact Pair, interaction=Contact2, type=SURFACE TO SURFACE
B_Trai2, Puch_B
** ----------------------------------------------------------------
**
** STEP: FormingStep
**
*Step, name=FormingStep, nlgeom=YES, inc=1000000
*Coupled Temperature-displacement, creep=none, deltmx=1e+07, stabilize=2e-06, allsdtol=0.05, continue=NO
0.001, 3., 1e-08, 3.
**
** BOUNDARY CONDITIONS
**
** Name: Nhet_punch Type: Temperature
*Boundary
Punch, 11, 11, 25.
** Name: Nhiet_B Type: Temperature
*Boundary
B, 11, 11, 1000.
** Name: Nhiet_Die Type: Temperature
*Boundary
Set-11, 11, 11, 25.
** Name: Punch Type: Displacement/Rotation
*Boundary, amplitude=Linera
Set-10, 1, 1
Set-10, 2, 2, -0.155
Set-10, 6, 6
**
** INTERACTIONS
**
** Contact Controls for Interaction: Die
*Contact Controls, master=Die_B, slave=B_Phai, stabilize=1e-05, tangent fraction=0.001
** Contact Controls for Interaction: Punch
*Contact Controls, master=Puch_B, slave=B_Trai2, stabilize=1e-05, tangent fraction=0.001
** Interaction: Doi luu
*Sfilm
Surf-8, F, 25., 10.
**
** OUTPUT REQUESTS
**
*Restart, write, frequency=0
**
** FIELD OUTPUT: F-Output-2
**
*Output, field
*Node Output
NT, U
*Element Output, directions=YES
E, S, TEMP
*Contact Output
HTL,
*Radiation Output
FTEMP,
**
** HISTORY OUTPUT: H-Output-2
**
*Output, history
*Contact Output
CSTRESS, HFLA, HTL
*Radiation Output
FTEMP,
*End Step
** ----------------------------------------------------------------
**
** STEP: Remove
**
*Step, name=Remove, nlgeom=YES, inc=1000000
*Coupled Temperature-displacement, creep=none, deltmx=1e+07, stabilize=2e-06, allsdtol=0.05, continue=NO
0.001, 3., 1e-10, 0.1
**
** BOUNDARY CONDITIONS
**
** Name: B Type: Symmetry/Antisymmetry/Encastre
*Boundary, op=NEW
Set-9, YSYMM
** Name: Die Type: Symmetry/Antisymmetry/Encastre
*Boundary, op=NEW
Set-8, ENCASTRE
** Name: Nhet_punch Type: Temperature
*Boundary, op=NEW
Punch, 11, 11, 25.
** Name: Nhiet_B Type: Temperature
*Boundary, op=NEW
B, 11, 11, 1000.
** Name: Nhiet_Die Type: Temperature
*Boundary, op=NEW
Set-11, 11, 11, 25.
** Name: Punch Type: Displacement/Rotation
*Boundary, op=NEW
Set-10, 1, 1
Set-10, 2, 2
Set-10, 6, 6
**
** OUTPUT REQUESTS
**
*Restart, write, frequency=0
**
** FIELD OUTPUT: F-Output-2
**
*Output, field
*Node Output
NT, U
*Element Output, directions=YES
E, S, TEMP
*Contact Output
HTL,
*Radiation Output
FTEMP,
**
** HISTORY OUTPUT: H-Output-2
**
*Output, history
*Contact Output
CSTRESS, HFLA, HTL
*Radiation Output
FTEMP,
*End Step
